// SBML level 3 version 1

model Kinetics1_0_Cbb_Small()

  // Compartments:
  compartment default = 1 volume;

  // Species:
  species BPG in default = 0.0015573415;
  species P2G in default = 0.2346815;
  species P3G in default = 9.017501;
  species ADP in default = 0.1576798;
  species DHAP in default = 0.0256586949;
  species E4P in default = 0.1511015;
  species F6P in default = 3.616984;
  species FBP in default = 0.3593934;
  species GAP in default = 0.2013062;
  species NADPH in default = 22.84333;
  species PEP in default = 0.2750401;
  species P_i in default = 1.24183;
  species R5P in default = 0.0424577447;
  species Ru5P in default = 0.0087417476;
  species RuBP in default = 0.0607179722;
  species S7P in default = 0.0692481808;
  species SBP in default = 0.0002623606;
  species Xu5P in default = 0.0379003739;
  species PYR in default = 0.0685932511;
  species ACETP in default = 0.0685932511;
  species ATP in default = 0.0685932511;
  species NADP in default = 0.1111907;
  species $O2 in default = 0.273;
  species $CO2_cax in default = 0.15;
  species $CO2_cyt in default = 0.15;
  species $ACCOA in default = 42.84959;
  species $NADH in default = 0.273;
  species $NAD in default = 0.15;
  species $COA in default = 42.84959;
  species $BioMass_R5P in default = 0;
  species $BioMass_F6P in default = 0;
  species $BioMass_E4P in default = 0;
  species $BioMass_PEP in default = 0;
  species $BioMass_PYR in default = 0;
  species $BioMass_P3G in default = 0;
  species $PPool in default = 0;

  // Reactions:
  RuBisCO: RuBP + $CO2_cax => P3G; P_i/(P_i + KaP_iv1)*V_maxv1*(RuBP*CO2_cax/(CO2_cax + KmCO2_caxv1*(1 + O2/KmO2v1)))/(RuBP + KmRuBPv1*(1 + P_i/KiP_iv1 + NADPH/KiNADPHv1));  // modifiers: O2, NADPH, P_i
    V_maxv1 = 1 substance; KmCO2_caxv1 = 1 substance; KmO2v1 = 1 substance; KmRuBPv1 = 1 substance; K_eqv1 = 56000000 substance; KiP_iv1 = 1 substance; KiNADPHv1 = 1 substance; KaP_iv1 = 1 substance;
  PGK: P3G + ATP => BPG + ADP; V_maxv2*(P3G*ATP/(KmP3Gv2*KmATPv2))*(1 - BPG*ADP/(P3G*ATP)/K_eqv2)/((1 + P3G/KmP3Gv2 + BPG/KmBPGv2)*(1 + ATP/KmATPv2 + ADP/KmADPv2));
    V_maxv2 = 1 substance; KmP3Gv2 = 1 substance; KmATPv2 = 1 substance; KmBPGv2 = 1 substance; KmADPv2 = 1 substance; K_eqv2 = 0.00051 substance;
  GAPD: BPG + NADPH => GAP + NADP + PHI; V_maxv3*(BPG*NADPH/(KmBPGv3*KmNADPHv3))*(1 - GAP*NADP*P_i/(BPG*NADPH)/K_eqv3)/((1 + NADP/KmNADPv3 + NADPH/KmNADPHv3)*(1 + GAP/KmGAPv3 + BPG/KmBPGv3 + P_i/KmP_iv3));
    V_maxv3 = 1 substance; KmNADPHv3 = 1 substance; KmBPGv3 = 1 substance; KmNADPv3 = 1 substance; KmGAPv3 = 1 substance; KmP_iv3 = 1 substance; K_eqv3 = 1.01 substance;
  TPI: GAP => DHAP; V_maxv4*(GAP/KmGAPv4)*(1 - DHAP/GAP/K_eqv4)/(1 + GAP/KmGAPv4 + DHAP/KmDHAPv4);
    V_maxv4 = 1 substance; KmDHAPv4 = 1 substance; KmGAPv4 = 1 substance; K_eqv4 = 9.42 substance;
  ALD: DHAP + GAP + E4P => FBP + SBP; V_maxv5*DHAP/KmDHAPv5*(GAP/KmGAPv5)*(1 - FBP/(DHAP*GAP)/K_eqv5)/((1 + FBP/KmFBPv5)*(1 + SBP/KmSBPv5) + (1 + DHAP/KmDHAPv5)*(1 + E4P/KmE4Pv5)*(1 + GAP/KmGAPv5) - 1);
    V_maxv5 = 1 substance; KmFBPv5 = 1 substance; KmDHAPv5 = 1 substance; KmGAPv5 = 1 substance; KmSBPv5 = 1 substance; KmE4Pv5 = 1 substance; K_eqv5 = 3703 substance;
  TKT1: GAP + F6P + S7P => Xu5P + E4P + R5P; V_maxv6*(F6P*GAP/(KmF6Pv6*KmGAPv6))*(1 - E4P*Xu5P/(F6P*GAP)/K_eqv6)/((1 + F6P/KmF6Pv6 + E4P/KmE4Pv6)*(1 + GAP/KmGAPv6 + Xu5P/KmXu5Pv6)*(1 + S7P/KmS7Pv6 + R5P/KmR5Pv6));
    V_maxv6 = 1 substance; KmF6Pv6 = 1 substance; KmGAPv6 = 1 substance; KmE4Pv6 = 1 substance; KmXu5Pv6 = 1 substance; KmS7Pv6 = 1 substance; KmR5Pv6 = 1 substance; K_eqv6 = 0.0158 substance;
  TKT2: GAP + F6P + S7P => Xu5P + E4P + R5P; V_maxv7*(S7P*GAP/(KmS7Pv7*KmGAPv7))*(1 - R5P*Xu5P/(S7P*GAP)/K_eqv7)/((1 + F6P/KmF6Pv7 + E4P/KmE4Pv7)*(1 + GAP/KmGAPv7 + Xu5P/KmXu5Pv7)*(1 + S7P/KmS7Pv7 + R5P/KmR5Pv7));
    V_maxv7 = 1 substance; KmF6Pv7 = 1 substance; KmGAPv7 = 1 substance; KmE4Pv7 = 1 substance; KmXu5Pv7 = 1 substance; KmS7Pv7 = 1 substance; KmR5Pv7 = 1 substance; K_eqv7 = 0.169 substance;
  FBPase: FBP + SBP => F6P + S7P + PHI; V_maxv8*FBP/(FBP + KmFBPv8*(1 + SBP/KmSBPv8));
    V_maxv8 = 1 substance; KmFBPv8 = 1 substance; KmSBPv8 = 1 substance; K_eqv8 = 153 substance;
  FBA: DHAP + E4P + GAP => FBP + SBP; V_maxv9*DHAP/KmDHAPv9*(E4P/KmE4Pv9)*(1 - SBP/(DHAP*E4P)/K_eqv9)/((1 + FBP/KmFBPv9)*(1 + SBP/KmSBPv9) + (1 + DHAP/KmDHAPv9)*(1 + E4P/KmE4Pv9)*(1 + GAP/KmGAPv9) - 1);
    V_maxv9 = 1 substance; KmFBPv9 = 1 substance; KmDHAPv9 = 1 substance; KmGAPv9 = 1 substance; KmSBPv9 = 1 substance; KmE4Pv9 = 1 substance; K_eqv9 = 161.29 substance;
  SBPase: FBP + SBP => F6P + S7P + PHI; V_maxv10*SBP/(SBP + KmSBPv10*(1 + FBP/KmFBPv10));
    V_maxv10 = 1 substance; KmFBPv10 = 1 substance; KmSBPv10 = 1 substance; K_eqv10 = 1500 substance;
  RPI: R5P => Ru5P; V_maxv11*(R5P/KmR5Pv11)*(1 - Ru5P/R5P/K_eqv11)/(1 + Ru5P/KmRu5Pv11 + R5P/KmR5Pv11);
    V_maxv11 = 1 substance; KmR5Pv11 = 1 substance; KmRu5Pv11 = 1 substance; K_eqv11 = 0.437 substance;
  RPE: Xu5P => Ru5P; V_maxv12*(Xu5P/KmXu5Pv12)*(1 - Ru5P/Xu5P/K_eqv12)/(1 + Ru5P/KmRu5Pv12 + Xu5P/KmXu5Pv12);
    V_maxv12 = 1 substance; KmXu5Pv12 = 1 substance; KmRu5Pv12 = 1 substance; K_eqv12 = 0.256 substance;
  PRK: Ru5P + ATP => RuBP + ADP; KiPEPv13/(PEP + KiPEPv13)*(KiADPv13/(ADP + KiADPv13))*V_maxv13*(Ru5P*ATP/(KmRu5Pv13*KmATPv13))*(1 - RuBP*ADP/(Ru5P*ATP)/K_eqv13)/((1 + Ru5P/KmRu5Pv13 + RuBP/KmRuBPv13)*(1 + ATP/KmATPv13 + ADP/KmADPv13));  // modifiers: PEP
    V_maxv13 = 1 substance; KmRu5Pv13 = 1 substance; KmATPv13 = 1 substance; KmRuBPv13 = 1 substance; KmADPv13 = 1 substance; K_eqv13 = 46000 substance; KiPEPv13 = 1 substance; KiADPv13 = 1 substance;
  PGM: P3G => P2G; V_maxv14*(P3G/KmP3Gv14)*(1 - P2G/P3G/K_eqv14)/(1 + P3G/KmP3Gv14 + P2G/KmP2Gv14);
    V_maxv14 = 1 substance; KmP3Gv14 = 1 substance; KmP2Gv14 = 1 substance; K_eqv14 = 0.19 substance;
  ENO: P2G => PEP; V_maxv15*(P2G/KmP2Gv15)*(1 - PEP/P2G/K_eqv15)/(1 + P2G/KmP2Gv15 + PEP/KmPEPv15);
    V_maxv15 = 1 substance; KmP2Gv15 = 1 substance; KmPEPv15 = 1 substance; K_eqv15 = 5.19 substance;
  PYK: PEP + ADP => PYR + ATP; R5P/(R5P + KaR5Pv16)*(KiP_iv16/(P_i + KiP_iv16))*(KiFBPv16/(FBP + KiFBPv16))*(KiATPv16/(ATP + KiATPv16))*V_maxv16*(PEP*ADP/(KmPEPv16*KmADPv16))*(1 - PYR*ATP/(PEP*ADP)/K_eqv16)/((1 + PEP/KmPEPv16 + PYR/KmPYRv16)*(1 + ADP/KmADPv16 + ATP/KmATPv16));  // modifiers: FBP, P_i, R5P
    V_maxv16 = 1 substance; KmPEPv16 = 1 substance; KmPYRv16 = 1 substance; KmADPv16 = 1 substance; KmATPv16 = 1 substance; K_eqv16 = 3400 substance; KaR5Pv16 = 1 substance; KiP_iv16 = 1 substance; KiFBPv16 = 1 substance; KiATPv16 = 1 substance;
  PDH: PYR + $NAD + $COA => $ACCOA + $NADH + $CO2_cyt; V_maxv17*(PYR*NAD*COA/(KmPYRv17*KmNADv17*KmCOAv17))*(1 - ACCOA*NADH*CO2_cyt/(PYR*NAD*COA*K_eqv17))/((1 + NAD/KmNADv17 + NADH/KmNADHv17)*(1 + PYR/KmPYRv17 + CO2_cyt/KmCO2_cytv17)*(ACCOA/KmACCOAv17 + COA/KmCOAv17));
    V_maxv17 = 1 substance; KmPYRv17 = 1 substance; KmNADv17 = 1 substance; KmCOAv17 = 1 substance; KmACCOAv17 = 1 substance; KmNADHv17 = 1 substance; KmCO2_cytv17 = 1 substance; K_eqv17 = 1300000 substance;
  XFPK1: F6P + Xu5P + PHI => E4P + ACETP + GAP; V_maxv18*(F6P*P_i/(KmF6Pv18*KmP_iv18))*(1 - E4P*ACETP/(F6P*P_i)/K_eqv18)/((1 + F6P/KmF6Pv18 + E4P/KmE4Pv18)*(1 + P_i/KmP_iv18 + ACETP/KmACETPv18)*(1 + Xu5P/KmXu5Pv18 + GAP/KmGAPv18));
    V_maxv18 = 1 substance; KmF6Pv18 = 1 substance; KmP_iv18 = 1 substance; KmE4Pv18 = 1 substance; KmACETPv18 = 1 substance; KmXu5Pv18 = 1 substance; KmGAPv18 = 1 substance; K_eqv18 = 610000000 substance;
  XFPK2: Xu5P + F6P + PHI => GAP + ACETP + E4P; V_maxv19*(Xu5P*P_i/(KmXu5Pv19*KmP_iv19))*(1 - GAP*ACETP/(Xu5P*P_i)/K_eqv19)/((1 + F6P/KmF6Pv19 + E4P/KmE4Pv19)*(1 + P_i/KmP_iv19 + ACETP/KmACETPv19)*(1 + Xu5P/KmXu5Pv19 + GAP/KmGAPv19));
    V_maxv19 = 1 substance; KmF6Pv19 = 1 substance; KmP_iv19 = 1 substance; KmE4Pv19 = 1 substance; KmACETPv19 = 1 substance; KmXu5Pv19 = 1 substance; KmGAPv19 = 1 substance; K_eqv19 = 39000000000 substance;
  PTA: ACETP + $COA => $ACCOA + PHI; V_maxv20*(ACETP*COA/(KmACETPv20*KmCOAv20))*(1 - ACCOA*P_i/(ACETP*COA)/K_eqv20)/((1 + ACETP/KmACETPv20 + ACCOA/KmACCOAv20)*(1 + COA/KmCOAv20 + P_i/KmP_iv20));
    V_maxv20 = 1 substance; KmACETPv20 = 1 substance; KmCOAv20 = 1 substance; KmACCOAv20 = 1 substance; KmP_iv20 = 1 substance; K_eqv20 = 35.2 substance;
  ATPSyn: ADP + PHI => ATP; V_maxv21*(ADP*P_i - ATP/K_eqv21)/(KmADPv21*KmP_iv21*(1 + ADP/KmADPv21 + P_i/KmP_iv21 + ATP/KmATPv21 + ADP*P_i/(KmADPv21*KmP_iv21)));
    V_maxv21 = 1 substance; KmADPv21 = 1 substance; KmP_iv21 = 1 substance; KmATPv21 = 1 substance; K_eqv21 = 13122.6 substance;
  NADPase: NADP => NADPH; V_maxv22*(NADP/KmNADPv22)*(1 - NADPH/NADP/K_eqv22)/(1 + NADP/KmNADPv22 + NADPH/KmNADPHv22);
    V_maxv22 = 1 substance; KmNADPv22 = 1 substance; KmNADPHv22 = 1 substance; K_eqv22 = 21.8 substance;
  Sink_R5P: R5P => $BioMass_R5P; V_maxv23*R5P/(KmR5Pv23 + R5P);
    V_maxv23 = 1 substance; KmR5Pv23 = 1 substance;
  Sink_F6P: F6P => $BioMass_F6P; V_maxv24*F6P/(KmF6Pv24 + F6P);
    V_maxv24 = 1 substance; KmF6Pv24 = 1 substance;
  Sink_E4P: E4P => $BioMass_E4P; V_maxv25*E4P/(KmE4Pv25 + E4P);
    V_maxv25 = 1 substance; KmE4Pv25 = 1 substance;
  Sink_PEP: PEP => $BioMass_PEP; V_maxv26*PEP/(KmPEPv26 + PEP);
    V_maxv26 = 1 substance; KmPEPv26 = 1 substance;
  Sink_PYR: PYR => $BioMass_PYR; V_maxv27*PYR/(KmPYRv27 + PYR);
    V_maxv27 = 1 substance; KmPYRv27 = 1 substance;
  Sink_P3G: P3G => $BioMass_P3G; V_maxv28*P3G/(KmP3Gv28 + P3G);
    V_maxv28 = 1 substance; KmP3Gv28 = 1 substance;
  Supply_P_i: $PPool => PHI; K_PPoolv29*(PPool - P_i);
    K_PPoolv29 = 1 substance;
end
